Simulations: Version=192
  Simulation
    Clock: Start=2001-01-01; End=2001-12-31
    Summary
    Weather: Latitude=40.764; Tav=10.5701; Amp=29.1048
      FileName=/Users/elhan/PycharmProjects/DigitalFields/external/SCE-main/openmeteo_era5_illinois_2001_2010/weather.met
    SoilArbitrator
    MicroClimate: a_interception=0; b_interception=1; c_interception=0; d_interception=0; SoilHeatFluxFraction=0; MinimumHeightDiffForNewLayer=0; NightInterceptionFraction=0; ReferenceHeight=2
    Zone Field: Area=1; Slope=0; AspectAngle=0; Altitude=50
      Fertiliser
      Soil: ASCOrder=Vertosol; ASCSubOrder=Black; SoilType=Clay; Site=Nowhere; NearestTown=Nowhere; ApsoilNumber=900; Latitude=-27.581836; Longitude=151.320206; LocationAccuracy=+/- 20m; YearOfSampling=0
        DataSource=CSIRO Sustainable Ecosystems, Toowoomba; Characteriesd as part of the GRDC funded project"Doing it better, doing it smarter, managing soil water in Australian agriculture' 2011
        Comments=Clay - OC, CLL for all crops estimated-based on Bongeen Mywybilla Soil No1
        Physical
          Thickness  ParticleSizeSand  ParticleSizeSilt  ParticleSizeClay  Rocks  BD       AirDry    LL15      DUL       SAT       KS
          150        4                 71.4              24.6              0      1.45     0.154733  0.154733  0.2998    0.45283   792.288
          150        4                 65                31                0      1.45     0.183     0.183     0.319     0.45283   792.288
          300        4                 65                31                0      1.45     0.183     0.183     0.319     0.45283   792.288
          300        4                 69.4333           26.5667           0      1.45     0.157033  0.157033  0.3019    0.45283   792.288
          300        4                 72                24                0      1.38333  0.136     0.136     0.287333  0.477987  792.288
          300        4                 72                24                0      1.35     0.133     0.133     0.285     0.490566  792.288
          300        4                 72                24                0      1.35     0.133     0.133     0.285     0.490566  792.288
          Rocks, ParticleSizeSand, ParticleSizeSilt, ParticleSizeClay source: Calculated
          SoilCrop SoybeanSoil: LL=[0.154733, 0.183, 0.183, 0.157033, 0.136, 0.133, 0.133]; KL=[0.06, 0.06, 0.06, 0.04, 0.04, 0.02, 0.01]; XF=[1, 1, 1, 1, 1, 1, 1]
        WaterBalance SoilWater: SummerDate=1-Jun; SummerU=9.05; SummerCona=4; WinterDate=1-Nov; WinterU=9.05; WinterCona=4; DiffusConst=40; DiffusSlope=16; Salb=0.15; CN2Bare=78; CNRed=20; CNCov=0.8; PSIDul=-100; Thickness=[150, 150, 300, 300, 300, 300, 300]; SWCON=[0.3, 0.3, 0.3, 0.3, 0.3, 0.3, 0.3]
        Organic: FOMCNRatio=40; CarbonUnits=Total
          Thickness  Carbon    SoilCNRatio  FBiom  FInert  FOM
          150        0.531667  12           0.04   0.4     347.129
          150        0.145     12           0.02   0.6     270.344
          300        0.145     12           0.02   0.8     163.972
          300        0.145     12           0.02   1       99.454
          300        0.145     12           0.01   1       60.322
          300        0.145     12           0.01   1       36.587
          300        0.145     12           0.01   1       22.191
        Chemical: PHUnits=Water
          Thickness  PH       CEC
          150        6.19333  11.045
          150        5.5      10.505
          300        5.5      9.695
          300        5.81667  9.02
          300        6.13333  8.75
          300        6.2      8.615
          300        6.2      8.615
          CEC source: Calculated
        Water: Thickness=[150, 150, 300, 300, 300, 300, 300]; InitialValues=[0.2998, 0.319, 0.319, 0.3019, 0.287333, 0.285, 0.285]; InitialPAWmm=263.02; RelativeTo=LL15; FilledFromTop=false
        Nutrient
        Solute NO3: Thickness=[150, 150, 300, 300, 300, 300, 300]; InitialValues=[1, 1, 1, 1, 1, 1, 1]; InitialValuesUnits=ppm; WaterTableConcentration=0; D0=0; DepthConstant=0; MaxDepthSoluteAccessible=0; RunoffEffectivenessAtMovingSolute=0; MaxEffectiveRunoff=0
        Solute NH4: Thickness=[150, 150, 300, 300, 300, 300, 300]; InitialValues=[0.1, 0.1, 0.1, 0.1, 0.1, 0.1, 0.1]; InitialValuesUnits=ppm; WaterTableConcentration=0; D0=0; DepthConstant=0; MaxDepthSoluteAccessible=0; RunoffEffectivenessAtMovingSolute=0; MaxEffectiveRunoff=0
        Solute Urea: Thickness=[150, 150, 300, 300, 300, 300, 300]; InitialValues=[0, 0, 0, 0, 0, 0, 0]; InitialValuesUnits=kg/ha; WaterTableConcentration=0; D0=0; DepthConstant=0; MaxDepthSoluteAccessible=0; RunoffEffectivenessAtMovingSolute=0; MaxEffectiveRunoff=0
        SoilTemperature Temperature
      Plant Soybean
        Cultivar early000
          Command:
            [Phenology].Vegetative.Target.FixedValue = 310
            [Phenology].EarlyFlowering.Target.FixedValue = 100
            [Phenology].EarlyGrainFilling.Target.FractionofGrainfilling.FixedValue = 0.475
            [Phenology].VegetativePhotoperiodModifier.XYPairs.X = 14.6, 22.35
            [Phenology].ReproductivePhotoperiodModifier.XYPairs.X = 14.6, 22.35
            [Phenology].LateGrainFilling.Target.EntireGrainfillPeriod.FixedValue = 590
            [Leaf].AreaLargestLeaf.FixedValue = 0.008
        Cultivar mid000
          Command:
            [Phenology].Vegetative.Target.FixedValue = 310
            [Phenology].EarlyFlowering.Target.FixedValue = 100
            [Phenology].EarlyGrainFilling.Target.FractionofGrainfilling.FixedValue = 0.475
            [Phenology].VegetativePhotoperiodModifier.XYPairs.X = 14.6, 22.35
            [Phenology].ReproductivePhotoperiodModifier.XYPairs.X = 14.6, 22.35
            [Phenology].LateGrainFilling.Target.EntireGrainfillPeriod.FixedValue = 531
            [Leaf].AreaLargestLeaf.FixedValue = 0.008
        Cultivar late000
          Command:
            [Phenology].Vegetative.Target.FixedValue = 312
            [Phenology].EarlyFlowering.Target.FixedValue = 100
            [Phenology].EarlyGrainFilling.Target.FractionofGrainfilling.FixedValue = 0.47372
            [Phenology].VegetativePhotoperiodModifier.XYPairs.X = 14.56, 22.15
            [Phenology].ReproductivePhotoperiodModifier.XYPairs.X = 14.56, 22.15
            [Phenology].LateGrainFilling.Target.EntireGrainfillPeriod.FixedValue = 592
            [Leaf].AreaLargestLeaf.FixedValue = 0.008
        Cultivar early00
          Command:
            [Phenology].Vegetative.Target.FixedValue = 318
            [Phenology].EarlyFlowering.Target.FixedValue = 100
            [Phenology].EarlyGrainFilling.Target.FractionofGrainfilling.FixedValue = 0.46836
            [Phenology].VegetativePhotoperiodModifier.XYPairs.X = 14.39, 21.32
            [Phenology].ReproductivePhotoperiodModifier.XYPairs.X = 14.39, 21.32
            [Phenology].LateGrainFilling.Target.EntireGrainfillPeriod.FixedValue = 598
            [Leaf].AreaLargestLeaf.FixedValue = 0.008
        Cultivar mid00
          Command:
            [Phenology].Vegetative.Target.FixedValue = 320
            [Phenology].EarlyFlowering.Target.FixedValue = 100
            [Phenology].EarlyGrainFilling.Target.FractionofGrainfilling.FixedValue = 0.467
            [Phenology].VegetativePhotoperiodModifier.XYPairs.X = 14.35, 21.11
            [Phenology].ReproductivePhotoperiodModifier.XYPairs.X = 14.35, 21.11
            [Phenology].LateGrainFilling.Target.EntireGrainfillPeriod.FixedValue = 480
            [Leaf].AreaLargestLeaf.FixedValue = 0.008
        Cultivar late00
          Command:
            [Phenology].Vegetative.Target.FixedValue = 323
            [Phenology].EarlyFlowering.Target.FixedValue = 103
            [Phenology].EarlyGrainFilling.Target.FractionofGrainfilling.FixedValue = 0.4598
            [Phenology].VegetativePhotoperiodModifier.XYPairs.X = 14.31, 20.92
            [Phenology].ReproductivePhotoperiodModifier.XYPairs.X = 14.31, 20.92
            [Phenology].LateGrainFilling.Target.EntireGrainfillPeriod.FixedValue = 603
            [Leaf].AreaLargestLeaf.FixedValue = 0.008
        Cultivar early0
          Command:
            [Phenology].Vegetative.Target.FixedValue = 333
            [Phenology].EarlyFlowering.Target.FixedValue = 117
            [Phenology].EarlyGrainFilling.Target.FractionofGrainfilling.FixedValue = 0.42965
            [Phenology].VegetativePhotoperiodModifier.XYPairs.X = 14.14, 20.15
            [Phenology].ReproductivePhotoperiodModifier.XYPairs.X = 14.14, 20.15
            [Phenology].LateGrainFilling.Target.EntireGrainfillPeriod.FixedValue = 613
            [Leaf].AreaLargestLeaf.FixedValue = 0.008
        Cultivar mid0
          Command:
            [Phenology].Vegetative.Target.FixedValue = 336
            [Phenology].EarlyFlowering.Target.FixedValue = 120
            [Phenology].EarlyGrainFilling.Target.FractionofGrainfilling.FixedValue = 0.422
            [Phenology].VegetativePhotoperiodModifier.XYPairs.X = 14.1, 19.95
            [Phenology].ReproductivePhotoperiodModifier.XYPairs.X = 14.1, 19.95
            [Phenology].LateGrainFilling.Target.EntireGrainfillPeriod.FixedValue = 616
            [Leaf].AreaLargestLeaf.FixedValue = 0.008
        Cultivar late0
          Command:
            [Phenology].Vegetative.Target.FixedValue = 337
            [Phenology].EarlyFlowering.Target.FixedValue = 120
            [Phenology].EarlyGrainFilling.Target.FractionofGrainfilling.FixedValue = 0.42024
            [Phenology].VegetativePhotoperiodModifier.XYPairs.X = 14.06, 19.76
            [Phenology].ReproductivePhotoperiodModifier.XYPairs.X = 14.06, 19.76
            [Phenology].LateGrainFilling.Target.EntireGrainfillPeriod.FixedValue = 619
            [Leaf].AreaLargestLeaf.FixedValue = 0.008
        Cultivar early1
          Command:
            [Phenology].Vegetative.Target.FixedValue = 339
            [Phenology].EarlyFlowering.Target.FixedValue = 120
            [Phenology].EarlyGrainFilling.Target.FractionofGrainfilling.FixedValue = 0.41287
            [Phenology].VegetativePhotoperiodModifier.XYPairs.X = 13.88, 18.97
            [Phenology].ReproductivePhotoperiodModifier.XYPairs.X = 13.88, 18.97
            [Phenology].LateGrainFilling.Target.EntireGrainfillPeriod.FixedValue = 629
            [Leaf].AreaLargestLeaf.FixedValue = 0.008
        Cultivar mid1
          Command:
            [Phenology].Vegetative.Target.FixedValue = 340
            [Phenology].EarlyFlowering.Target.FixedValue = 120
            [Phenology].EarlyGrainFilling.Target.FractionofGrainfilling.FixedValue = 0.411
            [Phenology].VegetativePhotoperiodModifier.XYPairs.X = 13.84, 18.77
            [Phenology].ReproductivePhotoperiodModifier.XYPairs.X = 13.84, 18.77
            [Phenology].LateGrainFilling.Target.EntireGrainfillPeriod.FixedValue = 632
            [Leaf].AreaLargestLeaf.FixedValue = 0.008
        Cultivar late1
          Command:
            [Phenology].Vegetative.Target.FixedValue = 341
            [Phenology].EarlyFlowering.Target.FixedValue = 120
            [Phenology].EarlyGrainFilling.Target.FractionofGrainfilling.FixedValue = 0.407
            [Phenology].VegetativePhotoperiodModifier.XYPairs.X = 13.8, 18.58
            [Phenology].ReproductivePhotoperiodModifier.XYPairs.X = 13.8, 18.58
            [Phenology].LateGrainFilling.Target.EntireGrainfillPeriod.FixedValue = 635
            [Leaf].AreaLargestLeaf.FixedValue = 0.008
        Cultivar early2
          Command:
            [Phenology].Vegetative.Target.FixedValue = 347
            [Phenology].EarlyFlowering.Target.FixedValue = 120
            [Phenology].EarlyGrainFilling.Target.FractionofGrainfilling.FixedValue = 0.39025
            [Phenology].VegetativePhotoperiodModifier.XYPairs.X = 13.63, 17.81
            [Phenology].ReproductivePhotoperiodModifier.XYPairs.X = 13.63, 17.81
            [Phenology].LateGrainFilling.Target.EntireGrainfillPeriod.FixedValue = 645
            [Leaf].AreaLargestLeaf.FixedValue = 0.008
        Cultivar mid2
          Command:
            [Phenology].Vegetative.Target.FixedValue = 348
            [Phenology].EarlyFlowering.Target.FixedValue = 120
            [Phenology].EarlyGrainFilling.Target.FractionofGrainfilling.FixedValue = 0.386
            [Phenology].VegetativePhotoperiodModifier.XYPairs.X = 13.59, 17.61
            [Phenology].ReproductivePhotoperiodModifier.XYPairs.X = 13.59, 17.61
            [Phenology].LateGrainFilling.Target.EntireGrainfillPeriod.FixedValue = 648
            [Leaf].AreaLargestLeaf.FixedValue = 0.008
        Cultivar late2
          Command:
            [Phenology].Vegetative.Target.FixedValue = 353
            [Phenology].EarlyFlowering.Target.FixedValue = 120
            [Phenology].EarlyGrainFilling.Target.FractionofGrainfilling.FixedValue = 0.382
            [Phenology].VegetativePhotoperiodModifier.XYPairs.X = 13.56, 17.5
            [Phenology].ReproductivePhotoperiodModifier.XYPairs.X = 13.56, 17.5
            [Phenology].LateGrainFilling.Target.EntireGrainfillPeriod.FixedValue = 651
            [Leaf].AreaLargestLeaf.FixedValue = 0.008
        Cultivar early3
          Command:
            [Phenology].Vegetative.Target.FixedValue = 375
            [Phenology].EarlyFlowering.Target.FixedValue = 120
            [Phenology].EarlyGrainFilling.Target.FractionofGrainfilling.FixedValue = 0.36525
            [Phenology].VegetativePhotoperiodModifier.XYPairs.X = 13.43, 17.03
            [Phenology].ReproductivePhotoperiodModifier.XYPairs.X = 13.43, 17.03
            [Phenology].LateGrainFilling.Target.EntireGrainfillPeriod.FixedValue = 661
            [Leaf].AreaLargestLeaf.FixedValue = 0.008
        Cultivar mid3
          Command:
            [Phenology].Vegetative.Target.FixedValue = 380
            [Phenology].EarlyFlowering.Target.FixedValue = 120
            [Phenology].EarlyGrainFilling.Target.FractionofGrainfilling.FixedValue = 0.361
            [Phenology].VegetativePhotoperiodModifier.XYPairs.X = 13.4, 16.91
            [Phenology].ReproductivePhotoperiodModifier.XYPairs.X = 13.4, 16.91
            [Phenology].LateGrainFilling.Target.EntireGrainfillPeriod.FixedValue = 664
            [Leaf].AreaLargestLeaf.FixedValue = 0.008
        Cultivar late3
          Command:
            [Phenology].Vegetative.Target.FixedValue = 381
            [Phenology].EarlyFlowering.Target.FixedValue = 123
            [Phenology].EarlyGrainFilling.Target.FractionofGrainfilling.FixedValue = 0.35508
            [Phenology].VegetativePhotoperiodModifier.XYPairs.X = 13.35, 16.84
            [Phenology].ReproductivePhotoperiodModifier.XYPairs.X = 13.35, 16.84
            [Phenology].LateGrainFilling.Target.EntireGrainfillPeriod.FixedValue = 664
            [Leaf].AreaLargestLeaf.FixedValue = 0.008
        Cultivar early4
          Command:
            [Phenology].Vegetative.Target.FixedValue = 387
            [Phenology].EarlyFlowering.Target.FixedValue = 137
            [Phenology].EarlyGrainFilling.Target.FractionofGrainfilling.FixedValue = 0.33029
            [Phenology].VegetativePhotoperiodModifier.XYPairs.X = 13.15, 16.56
            [Phenology].ReproductivePhotoperiodModifier.XYPairs.X = 13.15, 16.56
            [Phenology].LateGrainFilling.Target.EntireGrainfillPeriod.FixedValue = 664
            [Leaf].AreaLargestLeaf.FixedValue = 0.008
        Cultivar mid4
          Command:
            [Phenology].Vegetative.Target.FixedValue = 388
            [Phenology].EarlyFlowering.Target.FixedValue = 140
            [Phenology].EarlyGrainFilling.Target.FractionofGrainfilling.FixedValue = 0.324
            [Phenology].VegetativePhotoperiodModifier.XYPairs.X = 13.1, 16.49
            [Phenology].ReproductivePhotoperiodModifier.XYPairs.X = 13.1, 16.49
            [Phenology].LateGrainFilling.Target.EntireGrainfillPeriod.FixedValue = 664
            [Leaf].AreaLargestLeaf.FixedValue = 0.008
        Cultivar late4
          Command:
            [Phenology].Vegetative.Target.FixedValue = 389
            [Phenology].EarlyFlowering.Target.FixedValue = 143
            [Phenology].EarlyGrainFilling.Target.FractionofGrainfilling.FixedValue = 0.28368
            [Phenology].VegetativePhotoperiodModifier.XYPairs.X = 13.06, 16.43
            [Phenology].ReproductivePhotoperiodModifier.XYPairs.X = 13.06, 16.43
            [Phenology].LateGrainFilling.Target.EntireGrainfillPeriod.FixedValue = 669
            [Leaf].AreaLargestLeaf.FixedValue = 0.008
        Cultivar early5
          Command:
            [Phenology].Vegetative.Target.FixedValue = 395
            [Phenology].EarlyFlowering.Target.FixedValue = 157
            [Phenology].EarlyGrainFilling.Target.FractionofGrainfilling.FixedValue = 0.11484
            [Phenology].VegetativePhotoperiodModifier.XYPairs.X = 12.88, 16.19
            [Phenology].ReproductivePhotoperiodModifier.XYPairs.X = 12.88, 16.19
            [Phenology].LateGrainFilling.Target.EntireGrainfillPeriod.FixedValue = 691
            [Leaf].AreaLargestLeaf.FixedValue = 0.008
        Cultivar mid5
          Command:
            [Phenology].Vegetative.Target.FixedValue = 396
            [Phenology].EarlyFlowering.Target.FixedValue = 160
            [Phenology].EarlyGrainFilling.Target.FractionofGrainfilling.FixedValue = 0.072
            [Phenology].VegetativePhotoperiodModifier.XYPairs.X = 12.83, 16.13
            [Phenology].ReproductivePhotoperiodModifier.XYPairs.X = 12.83, 16.13
            [Phenology].LateGrainFilling.Target.EntireGrainfillPeriod.FixedValue = 696
            [Leaf].AreaLargestLeaf.FixedValue = 0.008
        Cultivar late5
          Command:
            [Phenology].Vegetative.Target.FixedValue = 397
            [Phenology].EarlyFlowering.Target.FixedValue = 163
            [Phenology].EarlyGrainFilling.Target.FractionofGrainfilling.FixedValue = 0.06944
            [Phenology].VegetativePhotoperiodModifier.XYPairs.X = 12.79, 16.08
            [Phenology].ReproductivePhotoperiodModifier.XYPairs.X = 12.79, 16.08
            [Phenology].LateGrainFilling.Target.EntireGrainfillPeriod.FixedValue = 699
            [Leaf].AreaLargestLeaf.FixedValue = 0.008
        Cultivar early6
          Command:
            [Phenology].Vegetative.Target.FixedValue = 403
            [Phenology].EarlyFlowering.Target.FixedValue = 177
            [Phenology].EarlyGrainFilling.Target.FractionofGrainfilling.FixedValue = 0.05872
            [Phenology].VegetativePhotoperiodModifier.XYPairs.X = 12.62, 15.86
            [Phenology].ReproductivePhotoperiodModifier.XYPairs.X = 12.62, 15.86
            [Phenology].LateGrainFilling.Target.EntireGrainfillPeriod.FixedValue = 709
            [Leaf].AreaLargestLeaf.FixedValue = 0.008
        Cultivar mid6
          Command:
            [Phenology].Vegetative.Target.FixedValue = 404
            [Phenology].EarlyFlowering.Target.FixedValue = 180
            [Phenology].EarlyGrainFilling.Target.FractionofGrainfilling.FixedValue = 0.056
            [Phenology].VegetativePhotoperiodModifier.XYPairs.X = 12.58, 15.8
            [Phenology].ReproductivePhotoperiodModifier.XYPairs.X = 12.58, 15.8
            [Phenology].LateGrainFilling.Target.EntireGrainfillPeriod.FixedValue = 712
            [Leaf].AreaLargestLeaf.FixedValue = 0.008
        Cultivar late6
          Command:
            [Phenology].Vegetative.Target.FixedValue = 406
            [Phenology].EarlyFlowering.Target.FixedValue = 183
            [Phenology].EarlyGrainFilling.Target.FractionofGrainfilling.FixedValue = 0.05584
            [Phenology].VegetativePhotoperiodModifier.XYPairs.X = 12.54, 15.75
            [Phenology].ReproductivePhotoperiodModifier.XYPairs.X = 12.54, 15.75
            [Phenology].LateGrainFilling.Target.EntireGrainfillPeriod.FixedValue = 715
            [Leaf].AreaLargestLeaf.FixedValue = 0.008
        Cultivar early7
          Command:
            [Phenology].Vegetative.Target.FixedValue = 414
            [Phenology].EarlyFlowering.Target.FixedValue = 197
            [Phenology].EarlyGrainFilling.Target.FractionofGrainfilling.FixedValue = 0.05517
            [Phenology].VegetativePhotoperiodModifier.XYPairs.X = 12.37, 15.52
            [Phenology].ReproductivePhotoperiodModifier.XYPairs.X = 12.37, 15.52
            [Phenology].LateGrainFilling.Target.EntireGrainfillPeriod.FixedValue = 725
            [Leaf].AreaLargestLeaf.FixedValue = 0.008
        Cultivar mid7
          Command:
            [Phenology].Vegetative.Target.FixedValue = 416
            [Phenology].EarlyFlowering.Target.FixedValue = 200
            [Phenology].EarlyGrainFilling.Target.FractionofGrainfilling.FixedValue = 0.055
            [Phenology].VegetativePhotoperiodModifier.XYPairs.X = 12.33, 15.46
            [Phenology].ReproductivePhotoperiodModifier.XYPairs.X = 12.33, 15.46
            [Phenology].LateGrainFilling.Target.EntireGrainfillPeriod.FixedValue = 728
            [Leaf].AreaLargestLeaf.FixedValue = 0.008
        Cultivar late7
          Command:
            [Phenology].Vegetative.Target.FixedValue = 418
            [Phenology].EarlyFlowering.Target.FixedValue = 200
            [Phenology].EarlyGrainFilling.Target.FractionofGrainfilling.FixedValue = 0.05484
            [Phenology].VegetativePhotoperiodModifier.XYPairs.X = 12.29, 15.4
            [Phenology].ReproductivePhotoperiodModifier.XYPairs.X = 12.29, 15.4
            [Phenology].LateGrainFilling.Target.EntireGrainfillPeriod.FixedValue = 731
            [Leaf].AreaLargestLeaf.FixedValue = 0.008
      SurfaceOrganicMatter: InitialResidueName=soybean; InitialResidueType=soybean; InitialResidueMass=2000; InitialStandingFraction=0.2; InitialCPR=0; InitialCNR=20
      Manager Sowing
        Crop = [Soybean]
        SowDate = 12-apr
        StartDate = 15-march
        EndDate = 31-may
        MinESW = 100
        MinRain = 25
        RainDays = 7
        ForceSow = True
        CultivarName = mid000
        SowingDepth = 30
        RowSpacing = 190
        Population = 40
```csharp
using Models.Interfaces;
using APSIM.Shared.Utilities;
using Models.Utilities;
using Models.Soils;
using Models.PMF;
using Models.Core;
using System;
using System.Linq;
using Models.Climate;

namespace Models
{
    [Serializable]
    public class Script : Model
    {
        [Link] private Clock Clock;
        [Link] private Fertiliser Fertiliser;
        [Link] private Summary Summary;
        [Link] private Soil Soil;
        private Accumulator accumulatedRain;
        [Link]
        private ISoilWater waterBalance;

        [Description("Crop")]
        public IPlant Crop { get; set; }

		[Separator("If Sowing Date is specified")]
		[Description("Sowing date (d-mmm)")]
        public string SowDate { get; set; }

		[Separator("If Sowing Date is not specified")]
        [Description("Start of sowing window (d-mmm)")]
        public string StartDate { get; set; }

        [Description("End of sowing window (d-mmm)")]
        public string EndDate { get; set; }

        [Description("Minimum extractable soil water for sowing (mm)")]
        public double MinESW { get; set; }

        [Description("Accumulated rainfall required for sowing (mm)")]
        public double MinRain { get; set; }

        [Description("Duration of rainfall accumulation (d)")]
        public int RainDays { get; set; }
        
        [Description("Force sowing by end of window?")]
        public bool ForceSow { get; set; }

		[Separator("Sowing Parameters")]
        [Display(Type = DisplayType.CultivarName)]
        [Description("Cultivar to be sown")]
        public string CultivarName { get; set; }

        [Description("Sowing depth (mm)")]
        public double SowingDepth { get; set; }

        [Description("Row spacing (mm)")]
        public double RowSpacing { get; set; }

        [Description("Plant population (/m2)")]
        public double Population { get; set; }

        
        public string SimSowDate { get; set; }
        public bool SeasonOpen { get; set; }
        
        [EventSubscribe("StartOfSimulation")]
        private void OnSimulationCommencing(object sender, EventArgs e)
        {
            accumulatedRain = new Accumulator(this, "[Weather].Rain", RainDays);
            SeasonOpen = true;
        }

        [EventSubscribe("DoManagement")]
        private void OnDoManagement(object sender, EventArgs e)
        {
            accumulatedRain.Update();
            SimSowDate = "NA";
            bool SowNow = false;
            
            if (SeasonOpen) { // Only allow one attempt at sowing.
                if (SowDate != "NA") {
		            if (DateUtilities.WithinDates(SowDate, Clock.Today, SowDate)) // Sow at date specified.
		            {
		               SowNow = true;
		            }
                } else { 
                    if (DateUtilities.WithinDates(StartDate, Clock.Today, EndDate) && // If no date specified, sow when parameters met. 
		                    !Crop.IsAlive &&
		                    MathUtilities.Sum(waterBalance.ESW) > MinESW &&
		                    accumulatedRain.Sum > MinRain)
		                {
		                    SowNow = true;
		                } 
		            if (ForceSow && // If it's the end of the sowing window and we haven't sown yet, sow. 
		                    !Crop.IsAlive &&
		                    DateUtilities.DatesEqual(EndDate, Clock.Today)) 
		                {
		                    SowNow = true;
		                }
		         }
		     }
		     
		     if (SowNow) {
		        Crop.Sow(population: Population, cultivar: CultivarName, depth: SowingDepth, rowSpacing: RowSpacing);    
		         	   SimSowDate = Clock.Today.ToString("yyyy-MM-dd");
		         	   SeasonOpen = false;
		     }
		     
        }
    }
}
```
      Manager Fertilise at sowing (disabled)
        Crop = [Soybean]
        FertiliserType = UreaN
        Amount = 220
```csharp
using Models.Soils;
using System;
using System.Linq;
using Models.Core;
using Models.PMF;
namespace Models
{
    [Serializable]
    public class Script : Model
    {
        [Link] Clock Clock;
        [Link] Fertiliser Fertiliser;
        
        [Description("Crop to be fertilised")]
        public IPlant Crop { get; set; }

        [Description("Type of fertiliser to apply? ")] 
        [Display(Type = DisplayType.FertiliserType)]public string FertiliserType { get; set; }
    
        [Description("Amount of fertiliser to be applied (kg/ha)")]
        public double Amount { get; set; }
        
        [EventSubscribe("Sowing")]
        private void OnSowing(object sender, EventArgs e)
        {
            Model crop = sender as Model;
            if (Crop != null && crop.Name.ToLower() == (Crop as IModel).Name.ToLower())
                Fertiliser.Apply(amount: Amount, type: FertiliserType);
        }
    }
}
```
      Manager Tillage on a fixed date (disabled)
        TillageDate = 20-mar
        Fraction = 0.4
        Depth = 150
```csharp
using Models.Soils;
using System;
using System.Linq;
using Models.Core;
using Models.PMF;
using APSIM.Shared.Utilities;
using Models.Surface;

namespace Models
{
    [Serializable]
    public class Script : Model
    {
        [Link] Clock Clock;
        [Link] SurfaceOrganicMatter SOM;
        
        [Description("Tillage Date")]
        public string TillageDate { get; set; }
        
        [Description("Fraction of Residues To Incorporate (0-1)")]
        public double Fraction { get; set; }

        [Description("Depth of Tillage (mm)")]
        public double Depth { get; set; }

        [EventSubscribe("DoManagement")]
        private void OnDoManagement(object sender, EventArgs e)
        {
            if (DateUtilities.WithinDates(TillageDate, Clock.Today, TillageDate))
                SOM.Incorporate(Fraction, Depth);
        }
    }
}
```
      Manager ReaperMan
        GermWait = 30
        EmergWait = 30
        MaxStall = 14
        LethalFrost = -2.5
```csharp
using APSIM.Shared.Utilities;
using Models.Utilities;
using Models.Soils;
using Models.PMF;
using Models.Core;
using System;
using System.Linq;
using Models.Functions;
using System.Diagnostics;
using Models.Climate;

namespace Models
{
    [Serializable] 
    public class Script : Model
    {
		[Link] Clock Clock;
        [Link] Zone Zone;
        [Link] Weather Weather;
        [Link] Summary Summary;
        [Link] IEvent Events = null;
        [Link] Models.PMF.Plant Crop;
        
        [Separator("Triggers to kill the crop")]

        [Description("Number of days to wait before killing ungerminated plants")] 
        public int GermWait { get; set; }  
        
        [Description("Number of days to wait before killing unemerged plants")] 
        public int EmergWait { get; set; }  
        
        [Description("Number of days to wait before killing stalled plants")] 
        public int MaxStall { get; set; }  
        public double PrevStage {get; set;}
        public int StalledFor {get; set;}  
        
        [Description("Kill if maximum daily tempterature is below (C)")]  
        public double LethalFrost { get; set; }
        
        private DateTime GerminationDeadline; 
        private DateTime EmergenceDeadline; 
         
        public string SimMatDate {get; set;} 
        public bool WasSown {get; set;}
        public bool MatDateRecorded {get; set;} 
        public string SimHarvestDate {get; set;} 
        public string Result {get; set;}   
        
        [EventSubscribe("StartOfSimulation")]
        private void OnStartOfSimulation(object sender, EventArgs e)
        {
            double PrevStage = 0;
            double StalledFor = 0;
            bool WasSown = false;
        }
        
        [EventSubscribe("Sowing")]
        private void OnSowing(object sender, EventArgs e)
        {
            GerminationDeadline = Clock.Today.AddDays(GermWait);
            EmergenceDeadline = Clock.Today.AddDays(EmergWait);
            WasSown = true;
            MatDateRecorded = false;
            
        }
        
        [EventSubscribe("DoManagement")]
        private void OnDoManagement(object sender, EventArgs e)
        {
  			bool End = false;
  			double Stage = (double)Crop.FindByPath("Phenology.Stage").Value; 
  			Result = "NA";
  			
  			if (Stage >= 10 && MatDateRecorded == false) {
	            SimMatDate = Clock.Today.ToString("yyyy-MM-dd");
	            MatDateRecorded = true;
	        } else {
	        	SimMatDate = "NA";
	        }
  			
            if (Crop.IsReadyForHarvesting)
            {
            	Summary.WriteMessage(this, "Result: Harvested at Maturity.", MessageType.Diagnostic);
                End = true;
                Result = "Harvested at Maturity.";
            } 
            else if (Crop.IsAlive) 
            {
	        	double LAI = (double)Crop.FindByPath("Leaf.LAI").Value; 
	        	        	
		        if (Stage == PrevStage) {
		        	StalledFor += 1;
		        	if (StalledFor >= MaxStall)
		        	{
			        	Summary.WriteMessage(this, "Result: Stalled, killed.", MessageType.Diagnostic);
			        	StalledFor = 0;
			        	PrevStage = 0;
						End = true;
						Result = "Stalled, killed.";
		        	}
		        } 
		        else 
		        {
		       		StalledFor = 0;
		        }
				PrevStage = Stage;

	        	if (Clock.Today == GerminationDeadline && Stage < 2)
	               {
	               Summary.WriteMessage(this, "Result: Failed to Germinate.", MessageType.Diagnostic);
	               End = true;
	               Result = "Failed to Germinate.";
		        }
	            else if (Clock.Today == EmergenceDeadline && Stage < 3)
	               {
	               Summary.WriteMessage(this, "Result: Failed to Emerge.", MessageType.Diagnostic);
				   End = true;
				   Result = "Failed to Emerge.";
		        }
		        else if (Weather.MaxT <= LethalFrost && Stage < 9)
	               {
	               Summary.WriteMessage(this, "Result: Dead from Frost.", MessageType.Diagnostic);
				   End = true;
				   Result = "Dead from Frost.";
		        }
		        else if (LAI <= 0.001 && Stage > 4 && Stage < 9.9)
	               {
	               Summary.WriteMessage(this, "Result: Dead from Total Senescence (0 LAI between Flowering and Maturation).", MessageType.Diagnostic);
				   End = true;
				   Result = "Dead from Total Senescence.";
		        }
	        }
	        
	        if (Clock.Today == Clock.EndDate) {
	            if (!WasSown) { 
                    Summary.WriteMessage(this, "Result: Unable to Meet Sowing Conditions.", MessageType.Diagnostic);
                    Result = "Unable to Meet Sowing Conditions.";
                }
	        }
	        
	        if (End == true) {
				Crop.Harvest();
		        Crop.EndCrop();
	            SimHarvestDate = Clock.Today.ToString("yyyy-MM-dd");
	        } else {
	        	SimHarvestDate = "NA";
	        }
      	}
    }
}
```
      Report: EventNames=[Clock].DoReport
        VariableNames:
          [Clock].Today as Date
          [Clock].Today.Year as Year
          [Clock].Today.DayOfYear as DOY
          [Phenology].CurrentPhaseName as StageName
          [Phenology].Stage as Stage
          [Sowing].Script.SimSowDate as SimSowDate
          [ReaperMan].Script.SimMatDate as SimMatDate
          [ReaperMan].Script.SimHarvestDate as SimHarvestDate
          [Weather].Rain as Rain
          [Weather].Radn as Radn
          [Weather].MaxT as MaxT
          [Weather].MeanT as MeanT
          [Weather].MinT as MinT
          [Phenology].ThermalTime as ThermalTime
          [Phenology].AccumulatedEmergedTT as AccEmTT
          [Soil].Temperature.Value[2] as SoilTemp
          sum([Soil].Water.PAWmm) as PAWmm
          sum([Soil].NH4.kgha) as NH4
          sum([Soil].NO3.kgha) as NO3
          sum([Soil].Urea.kgha) as Urea
          sum([Nutrient].Organic.C) as OrganicC
          [Leaf].FRGR as FracGrowthRate
          [Photosynthesis].FN as NutrientStress
          [Photosynthesis].FT as TempStress
          [Photosynthesis].FW as WaterStress
          [ReaperMan].Script.Result as Result
  DataStore
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